d := 19*mm
f_u := 450*MPa
h_sc := 100*mm
f_ck := 30*MPa
E_cm := 33*GPa
γ_V := 1.25
P_Ed := 57.2*kN
α := if(h_sc/d ≥ 4, 1, 0.2*(h_sc/d + 1))
P_Rd_1 := mult(0.8, f_u, π, d^2/4)/γ_V
P_Rd_2 := mult(0.29, α, d^2, sqrt(f_ck*E_cm))/γ_V
P_Rd := min(P_Rd_1, P_Rd_2)
h_eff := h_sc - 0.003*m
UR := P_Ed/P_Rd
UR ≤ 1 =  # no stored result
